# OpenSim document version 40600
Model neuromechfly_new:
  gravity: 0 -9806.65 0
  credits: Author: Gizem Ozdil, Chuanfang Ning
  length_units: m
  force_units: N
  Ground
  BodySet:
    Body A1A2: mass=0.0002139246 [kg] mass_center=(-0.2412801 0.003114721 0.01484476)
        inertia=(2.542735e-5 1.333119e-5 2.005354e-5 1.584979e-22 1.141185e-21 4.358691e-22)
        meshes=../meshes/stl/A1A2.stl
    Body A3: mass=0.000186803 mass_center=(-0.07158305 0.003458976 -0.05020043)
        inertia=(2.398946e-5 1.166704e-5 1.67418e-5 5.468176e-22 -5.071932e-22 1.783101e-22)
        meshes=../meshes/stl/A3.stl
    Body A4: mass=0.0001602039 mass_center=(-0.09085255 0.003440364 -0.06328317)
        inertia=(1.964645e-5 8.617454e-6 1.420619e-5 -4.200193e-22 -1.267983e-22 -2.654839e-22)
        meshes=../meshes/stl/A4.stl
    Body A5: mass=0.0001729171 mass_center=(-0.1055309 0.003596724 -0.06875754)
        inertia=(1.870163e-5 9.943774e-6 1.367448e-5 -1.188734e-22 0 6.339914e-23) meshes=../meshes/stl/A5.stl
    Body A6: mass=0.0001756665 mass_center=(-0.1615789 0.00335752 -0.04391474)
        inertia=(1.354818e-5 1.076634e-5 1.272301e-5 3.011459e-22 -2.535966e-22 -7.409775e-22)
        meshes=../meshes/stl/A6.stl
    Body Haustellum: mass=2.343059e-5 mass_center=(0.152665 0.02282244 -0.003167508)
        inertia=(3.245651e-7 3.720172e-7 4.988906e-7 1.971313e-23 -2.464141e-23 -7.392424e-24)
        meshes=../meshes/stl/Haustellum.stl
    Body Head: mass=0.0002225342 mass_center=(0.2554782 4.1764e-5 0.0005438051)
        inertia=(1.928852e-5 1.358266e-5 1.599472e-5 -8.251794e-22 -6.899596e-23 7.743089e-22)
        meshes=../meshes/stl/Head.stl
    Body LArista: mass=1.825124e-6 mass_center=(0.005958962 0.1169596 0.002477176)
        inertia=(1.333499e-8 3.451656e-9 1.104734e-8 0 1.443833e-25 -3.080177e-25) meshes=../meshes/stl/LArista.stl
    Body LEye: mass=4.176711e-5 mass_center=(-0.02747888 0.3046917 -0.02660422)
        inertia=(1.036735e-6 1.437338e-6 7.260123e-7 0 -3.460346e-23 4.152416e-22) meshes=../meshes/stl/LEye.stl
    Body LFCoxa: mass=9.738523e-6 mass_center=(0.004559661 -0.01132781 -0.2150032)
        inertia=(1.821461e-7 1.82938e-7 3.667962e-8 -7.209055e-25 1.441811e-23 -2.883622e-24)
        meshes=../meshes/stl/LFCoxa.stl
    Body LFFemur: mass=1.248302e-5 mass_center=(-0.005817114 0.06355887 -0.2799599)
        inertia=(4.147297e-7 4.014951e-7 4.648155e-8 -1.441811e-24 8.650866e-24 -4.613795e-23)
        meshes=../meshes/stl/LFFemur.stl
    Body LFTarsus1: mass=1.190084e-6 mass_center=(-0.004148014 -0.008983331 -0.1168308)
        inertia=(6.250463e-9 6.096605e-9 1.043283e-9 5.632074e-27 1.802264e-25 1.802264e-25)
        meshes=../meshes/stl/LFTarsus1.stl
    Body LFTarsus2: mass=5.142272e-7 mass_center=(-0.006167546 -0.007348054 -0.08578496)
        inertia=(1.184268e-9 1.179265e-9 2.961667e-10 -5.632074e-27 0 -4.505659e-26) meshes=../meshes/stl/LFTarsus2.stl
    Body LFTarsus3: mass=2.454807e-7 mass_center=(-0.004866644 -0.001324809 -0.05497358)
        inertia=(2.890369e-10 2.894828e-10 9.657001e-11 1.232016e-27 -2.25283e-26 -5.632074e-27)
        meshes=../meshes/stl/LFTarsus3.stl
    Body LFTarsus4: mass=1.701472e-7 mass_center=(-0.0007060507 -0.000287795 -0.0481465)
        inertia=(1.540726e-10 1.54176e-10 5.308188e-11 -9.735128e-28 3.520046e-27 -7.040093e-28)
        meshes=../meshes/stl/LFTarsus4.stl
    Body LFTarsus5: mass=3.030694e-7 mass_center=(-0.005198605 -0.004867373 -0.04789483)
        inertia=(3.396728e-10 3.530428e-10 1.554822e-10 -9.85613e-27 -2.25283e-26 -2.25283e-26)
        meshes=../meshes/stl/LFTarsus5.stl
    Body LFTibia: mass=4.515068e-6 mass_center=(0.02891049 -0.00239717 -0.2455615)
        inertia=(1.242065e-7 1.247625e-7 6.268106e-9 1.351698e-25 1.153449e-23 7.209055e-25)
        meshes=../meshes/stl/LFTibia.stl
    Body LFTrochanter: mass=1.703067e-6 mass_center=(-0.01363373 0.03419372 -0.01600036)
        inertia=(4.868313e-9 3.413501e-9 4.75181e-9 1.802264e-25 -2.25283e-25 5.406791e-25)
        meshes=../meshes/stl/LFTrochanter.stl
    Body LFuniculus: mass=2.287464e-6 mass_center=(0.006966755 -0.006069629 -0.1147341)
        inertia=(9.859509e-9 9.697625e-9 5.560692e-9 -9.625552e-26 -6.160354e-25 3.080177e-25)
        meshes=../meshes/stl/LFuniculus.stl
    Body LHCoxa: mass=7.175865e-6 mass_center=(-0.01596432 0.02464779 -0.09333767)
        inertia=(5.826681e-8 6.079322e-8 3.359917e-8 -3.604528e-25 -1.441811e-24 5.767244e-24)
        meshes=../meshes/stl/LHCoxa.stl
    Body LHFemur: mass=2.382342e-5 mass_center=(0.02324884 -0.0136841 -0.4320013)
        inertia=(1.572849e-6 1.57648e-6 1.129409e-7 1.441811e-24 -4.613795e-23 0) meshes=../meshes/stl/LHFemur.stl
    Body LHTarsus1: mass=2.72417e-6 mass_center=(-0.02341953 0.009080974 -0.186671)
        inertia=(3.330865e-8 3.374736e-8 3.477031e-9 0 -1.441811e-24 1.441811e-24) meshes=../meshes/stl/LHTarsus1.stl
    Body LHTarsus2: mass=9.427666e-7 mass_center=(-0.01530769 0.008862787 -0.09898707)
        inertia=(3.345483e-9 3.517941e-9 8.060056e-10 -4.505659e-26 -1.802264e-25 -1.802264e-25)
        meshes=../meshes/stl/LHTarsus2.stl
    Body LHTarsus3: mass=2.457712e-7 mass_center=(-0.01461372 0.007501328 -0.05618075)
        inertia=(2.81926e-10 2.925599e-10 9.798604e-11 5.632074e-27 2.25283e-26 0) meshes=../meshes/stl/LHTarsus3.stl
    Body LHTarsus4: mass=1.796188e-7 mass_center=(-0.01264918 0.005525852 -0.04400744)
        inertia=(1.468695e-10 1.500715e-10 6.364618e-11 4.224056e-27 -4.505659e-26 5.632074e-27)
        meshes=../meshes/stl/LHTarsus4.stl
    Body LHTarsus5: mass=4.764842e-7 mass_center=(-0.01824537 0.007695779 -0.05398592)
        inertia=(6.183231e-10 6.489773e-10 3.734712e-10 0 9.011319e-26 2.25283e-26) meshes=../meshes/stl/LHTarsus5.stl
    Body LHTibia: mass=1.12096e-5 mass_center=(0.006262926 -0.006790715 -0.3488911)
        inertia=(5.520025e-7 5.56118e-7 2.905011e-8 -5.406791e-25 -1.153449e-23 1.153449e-23)
        meshes=../meshes/stl/LHTibia.stl
    Body LHaltere: mass=4.30889e-6 mass_center=(-0.02069047 0.1657555 0.01179575)
        inertia=(5.659264e-8 1.236119e-8 5.397171e-8 0 2.60569e-25 0) meshes=../meshes/stl/LHaltere.stl
    Body LMCoxa: mass=9.123575e-6 mass_center=(-0.003663903 0.01201746 -0.07745121)
        inertia=(8.679041e-8 7.882275e-8 5.403765e-8 -1.622037e-24 3.604528e-24 -1.441811e-24)
        meshes=../meshes/stl/LMCoxa.stl
    Body LMFemur: mass=1.512678e-5 mass_center=(0.01661077 0.002962755 -0.4116911)
        inertia=(9.013933e-7 9.078763e-7 4.80556e-8 9.011319e-25 1.153449e-23 -5.767244e-24)
        meshes=../meshes/stl/LMFemur.stl
    Body LMTarsus1: mass=1.309464e-6 mass_center=(-0.013342 0.005052714 -0.1705678)
        inertia=(9.923236e-9 1.014351e-8 1.033634e-9 2.25283e-26 -3.604528e-25 -1.802264e-25)
        meshes=../meshes/stl/LMTarsus1.stl
    Body LMTarsus2: mass=3.96462e-7 mass_center=(-0.009951937 0.004583874 -0.09797525)
        inertia=(9.36129e-10 9.530821e-10 1.703492e-10 8.448111e-27 -4.505659e-26 -2.25283e-26)
        meshes=../meshes/stl/LMTarsus2.stl
    Body LMTarsus3: mass=2.796071e-7 mass_center=(-0.008505696 0.005546834 -0.06342837)
        inertia=(3.194004e-10 3.440152e-10 1.293862e-10 2.816037e-27 -2.25283e-26 -1.126415e-26)
        meshes=../meshes/stl/LMTarsus3.stl
    Body LMTarsus4: mass=1.296433e-7 mass_center=(-0.006609176 0.00459102 -0.0474418)
        inertia=(7.13338e-11 7.772051e-11 4.202333e-11 0 -1.689622e-26 5.632074e-27) meshes=../meshes/stl/LMTarsus4.stl
    Body LMTarsus5: mass=3.787395e-7 mass_center=(-0.007948676 0.005781316 -0.05833322)
        inertia=(4.660814e-10 4.646481e-10 2.381958e-10 -2.816037e-27 0 -2.25283e-26)
        meshes=../meshes/stl/LMTarsus5.stl
    Body LMTibia: mass=8.076494e-6 mass_center=(0.01051001 0.004635032 -0.3577355)
        inertia=(3.722993e-7 3.752257e-7 1.566224e-8 3.604528e-25 5.767244e-24 -5.767244e-24)
        meshes=../meshes/stl/LMTibia.stl
    Body LPedicel: mass=3.704228e-6 mass_center=(0.05814968 0.007814135 -0.02462433)
        inertia=(1.533254e-8 1.666882e-8 2.215747e-8 -6.160354e-25 6.160354e-25 -1.540088e-25)
        meshes=../meshes/stl/LPedicel.stl
    Body LWing: mass=8.35992e-5 mass_center=(-0.137186 1.094782 0.1501029)
        inertia=(4.169412e-5 9.619429e-6 4.875631e-5 0 0 -1.825303e-21) meshes=../meshes/stl/LWing.stl
    Body RArista: mass=2.006955e-6 mass_center=(0.007544148 -0.108724 0.001831595)
        inertia=(1.46812e-8 4.06603e-9 1.210484e-8 3.080177e-25 5.775331e-26 -1.309075e-24)
        meshes=../meshes/stl/RArista.stl
    Body REye: mass=4.656371e-5 mass_center=(-0.03730915 -0.2957037 -0.03675051)
        inertia=(1.187317e-6 1.63701e-6 8.76892e-7 0 -1.153449e-23 -1.845518e-22) meshes=../meshes/stl/REye.stl
    Body RFCoxa: mass=9.000731e-6 mass_center=(0.01077111 0.01745023 -0.2220838)
        inertia=(1.610425e-7 1.621666e-7 3.200042e-8 7.209055e-25 2.883622e-24 5.767244e-24)
        meshes=../meshes/stl/RFCoxa.stl
    Body RFFemur: mass=1.356986e-5 mass_center=(-0.01002438 -0.05451579 -0.2744259)
        inertia=(4.514837e-7 4.311566e-7 5.676444e-8 -1.441811e-24 0 -4.613795e-23) meshes=../meshes/stl/RFFemur.stl
    Body RFTarsus1: mass=1.117724e-6 mass_center=(-0.006859605 0.003623454 -0.1171367)
        inertia=(5.745162e-9 5.693923e-9 9.15659e-10 1.689622e-26 0 1.802264e-25) meshes=../meshes/stl/RFTarsus1.stl
    Body RFTarsus2: mass=4.341217e-7 mass_center=(-0.004623433 0.005786109 -0.08682726)
        inertia=(9.668973e-10 9.810014e-10 2.120979e-10 8.448111e-27 9.011319e-26 0) meshes=../meshes/stl/RFTarsus2.stl
    Body RFTarsus3: mass=2.17147e-7 mass_center=(-0.008628865 0.0001720873 -0.05697792)
        inertia=(2.470055e-10 2.472138e-10 7.632144e-11 1.320017e-27 -2.25283e-26 -3.872051e-27)
        meshes=../meshes/stl/RFTarsus3.stl
    Body RFTarsus4: mass=1.623058e-7 mass_center=(-0.005782373 -0.003159331 -0.04654875)
        inertia=(1.483622e-10 1.464294e-10 4.800933e-11 -7.040093e-28 -1.689622e-26 8.448111e-27)
        meshes=../meshes/stl/RFTarsus4.stl
    Body RFTarsus5: mass=2.566053e-7 mass_center=(-0.008260768 -0.0002189372 -0.04666784)
        inertia=(2.863919e-10 2.89752e-10 1.097162e-10 -2.200029e-27 1.126415e-26 -4.224056e-27)
        meshes=../meshes/stl/RFTarsus5.stl
    Body RFTibia: mass=4.391955e-6 mass_center=(0.02359381 -0.01427908 -0.2440495)
        inertia=(1.209582e-7 1.215078e-7 5.927402e-9 1.802264e-25 0 5.767244e-24) meshes=../meshes/stl/RFTibia.stl
    Body RFTrochanter: mass=1.64287e-6 mass_center=(-0.01400091 -0.03440294 -0.01510075)
        inertia=(4.59801e-9 3.170604e-9 4.575268e-9 -1.802264e-25 0 -7.209055e-25)
        meshes=../meshes/stl/RFTrochanter.stl
    Body RFuniculus: mass=2.359797e-6 mass_center=(-0.0002661054 0.01214572 -0.1132553)
        inertia=(1.043727e-8 9.925132e-9 5.941191e-9 -1.804791e-26 7.219164e-25 6.160354e-25)
        meshes=../meshes/stl/RFuniculus.stl
    Body RHCoxa: mass=7.180088e-6 mass_center=(-0.0158789 -0.01761774 -0.09339812)
        inertia=(5.830835e-8 6.085224e-8 3.363748e-8 1.081358e-24 0 2.883622e-24) meshes=../meshes/stl/RHCoxa.stl
    Body RHFemur: mass=2.378088e-5 mass_center=(0.02323067 0.02014825 -0.43204)
        inertia=(1.569821e-6 1.573625e-6 1.125453e-7 5.767244e-24 0 -6.920693e-23) meshes=../meshes/stl/RHFemur.stl
    Body RHTarsus1: mass=2.620572e-6 mass_center=(-0.02690216 0.001290524 -0.1867139)
        inertia=(3.169629e-8 3.284321e-8 3.39203e-9 5.632074e-26 0 -9.011319e-26) meshes=../meshes/stl/RHTarsus1.stl
    Body RHTarsus2: mass=7.397246e-7 mass_center=(-0.01111978 0.001940228 -0.09902252)
        inertia=(2.598278e-9 2.651344e-9 4.871308e-10 1.689622e-26 -1.802264e-25 2.027547e-25)
        meshes=../meshes/stl/RHTarsus2.stl
    Body RHTarsus3: mass=2.696227e-7 mass_center=(-0.01417136 0.004400427 -0.05614164)
        inertia=(3.169091e-10 3.221801e-10 1.174762e-10 0 0 2.25283e-26) meshes=../meshes/stl/RHTarsus3.stl
    Body RHTarsus4: mass=2.058073e-7 mass_center=(-0.01157 0.005079286 -0.04416762)
        inertia=(1.742844e-10 1.778328e-10 8.329273e-11 1.408019e-27 0 5.632074e-27) meshes=../meshes/stl/RHTarsus4.stl
    Body RHTarsus5: mass=4.282255e-7 mass_center=(-0.01192499 0.004926859 -0.05396246)
        inertia=(5.70362e-10 5.358556e-10 3.025369e-10 2.816037e-27 -9.011319e-26 6.758489e-26)
        meshes=../meshes/stl/RHTarsus5.stl
    Body RHTibia: mass=1.089071e-5 mass_center=(0.01037511 0.01202562 -0.3488862)
        inertia=(5.345568e-7 5.417166e-7 2.807484e-8 -1.081358e-24 1.153449e-23 0) meshes=../meshes/stl/RHTibia.stl
    Body RHaltere: mass=4.293152e-6 mass_center=(-0.0214561 -0.1601414 0.007807954)
        inertia=(5.670276e-8 1.240028e-8 5.354621e-8 2.084552e-24 3.908534e-25 0) meshes=../meshes/stl/RHaltere.stl
    Body RMCoxa: mass=9.122921e-6 mass_center=(-0.003676912 -0.005038222 -0.07742934)
        inertia=(8.678638e-8 7.883133e-8 5.402139e-8 -1.869849e-24 -3.604528e-25 4.325433e-24)
        meshes=../meshes/stl/RMCoxa.stl
    Body RMFemur: mass=1.513649e-5 mass_center=(0.01660125 0.004115864 -0.4116797)
        inertia=(9.020135e-7 9.084745e-7 4.811281e-8 3.063848e-24 -1.153449e-23 -5.767244e-24)
        meshes=../meshes/stl/RMFemur.stl
    Body RMTarsus1: mass=1.335082e-6 mass_center=(-0.02023239 0.0001889985 -0.1871214)
        inertia=(1.011111e-8 1.035223e-8 1.077648e-9 1.760023e-26 7.209055e-25 2.534433e-25)
        meshes=../meshes/stl/RMTarsus1.stl
    Body RMTarsus2: mass=3.970068e-7 mass_center=(-0.01534114 0.002657303 -0.1189367)
        inertia=(9.374199e-10 9.542323e-10 1.708183e-10 -5.632074e-27 -1.802264e-25 2.25283e-26)
        meshes=../meshes/stl/RMTarsus2.stl
    Body RMTarsus3: mass=2.842594e-7 mass_center=(-0.01555177 -0.000163147 -0.0831933)
        inertia=(3.210827e-10 3.500637e-10 1.352875e-10 -9.416124e-27 4.505659e-26 -2.112028e-27)
        meshes=../meshes/stl/RMTarsus3.stl
    Body RMTarsus4: mass=1.304565e-7 mass_center=(-0.01353175 0.001546548 -0.06470433)
        inertia=(7.124694e-11 7.730669e-11 4.289235e-11 1.056014e-27 6.758489e-26 2.816037e-27)
        meshes=../meshes/stl/RMTarsus4.stl
    Body RMTarsus5: mass=3.792678e-7 mass_center=(-0.01697725 8.775896e-5 -0.07519871)
        inertia=(4.644555e-10 4.646959e-10 2.395267e-10 -1.452019e-26 0 -2.393632e-26)
        meshes=../meshes/stl/RMTarsus5.stl
    Body RMTibia: mass=8.111911e-6 mass_center=(0.00282469 0.002241815 -0.3743872)
        inertia=(3.738411e-7 3.7696e-7 1.583298e-8 -5.632074e-26 -4.325433e-24 2.883622e-24)
        meshes=../meshes/stl/RMTibia.stl
    Body RPedicel: mass=3.956769e-6 mass_center=(0.05573768 -0.007821742 -0.02725071)
        inertia=(1.740087e-8 1.832446e-8 2.497485e-8 9.24053e-25 1.232071e-24 -4.620265e-25)
        meshes=../meshes/stl/RPedicel.stl
    Body RWing: mass=8.465565e-5 mass_center=(-0.1338196 -1.089225 0.1542369)
        inertia=(4.226072e-5 9.743514e-6 4.93375e-5 -9.126514e-21 -9.126514e-22 3.650606e-21)
        meshes=../meshes/stl/RWing.stl
    Body Rostrum: mass=6.845138e-5 mass_center=(0.006564936 0.01814966 -0.1716767)
        inertia=(1.927147e-6 2.384503e-6 2.338201e-6 1.232071e-23 5.913939e-23 -3.942626e-23)
        meshes=../meshes/stl/Rostrum.stl
    Body Thorax: mass=0.0007647451 mass_center=(-0.4943218 0.006324131 -0.09233296)
        inertia=(0.0001327413 0.0001478786 0.0001305648 -6.13692e-21 4.269162e-21 -1.400819e-21)
        meshes=../meshes/stl/Thorax.stl
  JointSet:
    WeldJoint joint_Thorax: socket_parent_frame=ground_offset socket_child_frame=Thorax_offset
      PhysicalOffsetFrame ground_offset: socket_parent=/ground translation=(0 4 0) [meters]
          orientation=(-1.57 0 0) [radians]
      PhysicalOffsetFrame Thorax_offset: socket_parent=/bodyset/Thorax translation=(0 0 0)
    WeldJoint joint_A1A2: socket_parent_frame=Thorax_offset socket_child_frame=A1A2_offset
      PhysicalOffsetFrame Thorax_offset: socket_parent=/bodyset/Thorax translation=(-0.8330898 0.00368827 -0.1675561)
      PhysicalOffsetFrame A1A2_offset: socket_parent=/bodyset/A1A2
    WeldJoint joint_A3: socket_parent_frame=A1A2_offset socket_child_frame=A3_offset
      PhysicalOffsetFrame A1A2_offset: socket_parent=/bodyset/A1A2 translation=(-0.3564738 1.131048e-5 0.0006224727)
      PhysicalOffsetFrame A3_offset: socket_parent=/bodyset/A3
    WeldJoint joint_A4: socket_parent_frame=A3_offset socket_child_frame=A4_offset
      PhysicalOffsetFrame A3_offset: socket_parent=/bodyset/A3 translation=(-0.2375823 7.636118e-6 0.001244945)
      PhysicalOffsetFrame A4_offset: socket_parent=/bodyset/A4
    WeldJoint joint_A5: socket_parent_frame=A4_offset socket_child_frame=A5_offset
      PhysicalOffsetFrame A4_offset: socket_parent=/bodyset/A4 translation=(-0.2142946 6.8394e-6 0.0007057097)
      PhysicalOffsetFrame A5_offset: socket_parent=/bodyset/A5
    WeldJoint joint_A6: socket_parent_frame=A5_offset socket_child_frame=A6_offset
      PhysicalOffsetFrame A5_offset: socket_parent=/bodyset/A5 translation=(-0.2680453 8.629286e-6 0.001504784)
      PhysicalOffsetFrame A6_offset: socket_parent=/bodyset/A6
    WeldJoint joint_Haustellum: socket_parent_frame=Rostrum_offset socket_child_frame=Haustellum_offset
      PhysicalOffsetFrame Rostrum_offset: socket_parent=/bodyset/Rostrum
          translation=(0.03579387 -0.0004680714 -0.3697209)
      PhysicalOffsetFrame Haustellum_offset: socket_parent=/bodyset/Haustellum
    WeldJoint joint_Head: socket_parent_frame=Thorax_offset socket_child_frame=Head_offset
      PhysicalOffsetFrame Thorax_offset: socket_parent=/bodyset/Thorax
          translation=(0.02131582 0.0007789022 0.009236275)
      PhysicalOffsetFrame Head_offset: socket_parent=/bodyset/Head
    WeldJoint joint_LArista: socket_parent_frame=LFuniculus_offset socket_child_frame=LArista_offset
      PhysicalOffsetFrame LFuniculus_offset: socket_parent=/bodyset/LFuniculus
          translation=(0.02065068 0.04885574 -0.07050298)
      PhysicalOffsetFrame LArista_offset: socket_parent=/bodyset/LArista
    WeldJoint joint_LEye: socket_parent_frame=Head_offset socket_child_frame=LEye_offset
      PhysicalOffsetFrame Head_offset: socket_parent=/bodyset/Head translation=(0.2549312 0.003504316 0.02267305)
      PhysicalOffsetFrame LEye_offset: socket_parent=/bodyset/LEye
    CustomJoint joint_LFCoxa: socket_parent_frame=Thorax_offset socket_child_frame=LFCoxa_offset
      Coordinate joint_LFCoxa_yaw: default_value=0.1745329 range=(-0.5970219 0.2745329)
      Coordinate joint_LFCoxa_pitch: default_value=0.4357122 range=(-0.5782672 0.737511)
      Coordinate joint_LFCoxa_roll: default_value=0.2614159 range=(0.1436404 0.6235988) clamped=true
      PhysicalOffsetFrame Thorax_offset: socket_parent=/bodyset/Thorax translation=(-0.1305552 0.1994726 -0.2304981)
      PhysicalOffsetFrame LFCoxa_offset: socket_parent=/bodyset/LFCoxa
      SpatialTransform: axes_held_at_zero=(translation1 translation2 translation3)
        TransformAxis rotation1: coordinates=joint_LFCoxa_yaw axis=(1 0 0) LinearFunction(coefficients=1 0)
        TransformAxis rotation2: coordinates=joint_LFCoxa_pitch axis=(0 1 0) LinearFunction(coefficients=1 0)
        TransformAxis rotation3: coordinates=joint_LFCoxa_roll axis=(0 0 1) LinearFunction(coefficients=1 0)
    CustomJoint joint_LFTrochanter: socket_parent_frame=LFCoxa_offset socket_child_frame=LFTrochanter_offset
      Coordinate joint_LFTrochanter_yaw: default_value=-0.4081462 range=(-1.196123 0.2745329)
      Coordinate joint_LFTrochanter_pitch: default_value=-2.387996 range=(-3.241593 -1.216808) clamped=false
      Coordinate joint_LFTrochanter_roll: default_value=0.1701595 range=(-0.2745329 1.38375)
      PhysicalOffsetFrame LFCoxa_offset: socket_parent=/bodyset/LFCoxa translation=(-0.001999899 0.01499994 -0.4401798)
      PhysicalOffsetFrame LFTrochanter_offset: socket_parent=/bodyset/LFTrochanter
      SpatialTransform: axes_held_at_zero=(translation1 translation2 translation3)
        TransformAxis rotation1: coordinates=joint_LFTrochanter_yaw axis=(1 0 0) LinearFunction(coefficients=1 0)
        TransformAxis rotation2: coordinates=joint_LFTrochanter_pitch axis=(0 1 0) LinearFunction(coefficients=1 0)
        TransformAxis rotation3: coordinates=joint_LFTrochanter_roll axis=(0 0 1) LinearFunction(coefficients=1 0)
    CustomJoint joint_LFTibia: socket_parent_frame=LFFemur_offset socket_child_frame=LFTibia_offset
      Coordinate joint_LFTibia_pitch: default_value=1.862188 range=(0.4788638 2.502116) clamped=true
      PhysicalOffsetFrame LFFemur_offset: socket_parent=/bodyset/LFFemur translation=(-0.01982314 0.1002642 -0.5660697)
      PhysicalOffsetFrame LFTibia_offset: socket_parent=/bodyset/LFTibia
      SpatialTransform: axes_held_at_zero=(rotation2 rotation3 translation1 translation2 translation3)
        TransformAxis rotation1: coordinates=joint_LFTibia_pitch axis=(0 1 0) LinearFunction(coefficients=1 0)
    WeldJoint joint_LFFemur: socket_parent_frame=LFTrochanter_offset socket_child_frame=LFFemur_offset
      PhysicalOffsetFrame LFTrochanter_offset: socket_parent=/bodyset/LFTrochanter
          translation=(-0.01993545 0.07243511 -0.0623755)
      PhysicalOffsetFrame LFFemur_offset: socket_parent=/bodyset/LFFemur
    WeldJoint joint_LFTarsus1: socket_parent_frame=LFTibia_offset socket_child_frame=LFTarsus1_offset
      PhysicalOffsetFrame LFTibia_offset: socket_parent=/bodyset/LFTibia translation=(0.01915405 -0.01293223 -0.510014)
      PhysicalOffsetFrame LFTarsus1_offset: socket_parent=/bodyset/LFTarsus1
    WeldJoint joint_LFTarsus2: socket_parent_frame=LFTarsus1_offset socket_child_frame=LFTarsus2_offset
      PhysicalOffsetFrame LFTarsus1_offset: socket_parent=/bodyset/LFTarsus1
          translation=(-0.000246393 -0.01940221 -0.2175028)
      PhysicalOffsetFrame LFTarsus2_offset: socket_parent=/bodyset/LFTarsus2
    WeldJoint joint_LFTarsus3: socket_parent_frame=LFTarsus2_offset socket_child_frame=LFTarsus3_offset
      PhysicalOffsetFrame LFTarsus2_offset: socket_parent=/bodyset/LFTarsus2
          translation=(-0.002981193 -0.01950705 -0.1548562)
      PhysicalOffsetFrame LFTarsus3_offset: socket_parent=/bodyset/LFTarsus3
    WeldJoint joint_LFTarsus4: socket_parent_frame=LFTarsus3_offset socket_child_frame=LFTarsus4_offset
      PhysicalOffsetFrame LFTarsus3_offset: socket_parent=/bodyset/LFTarsus3
          translation=(-0.002051005 -0.009804993 -0.09654416)
      PhysicalOffsetFrame LFTarsus4_offset: socket_parent=/bodyset/LFTarsus4
    WeldJoint joint_LFTarsus5: socket_parent_frame=LFTarsus4_offset socket_child_frame=LFTarsus5_offset
      PhysicalOffsetFrame LFTarsus4_offset: socket_parent=/bodyset/LFTarsus4
          translation=(0.0007281487 -0.00986291 -0.08672161)
      PhysicalOffsetFrame LFTarsus5_offset: socket_parent=/bodyset/LFTarsus5
    WeldJoint joint_LFuniculus: socket_parent_frame=LPedicel_offset socket_child_frame=LFuniculus_offset
      PhysicalOffsetFrame LPedicel_offset: socket_parent=/bodyset/LPedicel
          translation=(0.03883231 -0.0003079767 -0.03700017)
      PhysicalOffsetFrame LFuniculus_offset: socket_parent=/bodyset/LFuniculus
    WeldJoint joint_LHCoxa: socket_parent_frame=Thorax_offset socket_child_frame=LHCoxa_offset
      PhysicalOffsetFrame Thorax_offset: socket_parent=/bodyset/Thorax translation=(-0.752263 0.09064554 -0.5018056)
      PhysicalOffsetFrame LHCoxa_offset: socket_parent=/bodyset/LHCoxa
    WeldJoint joint_LHFemur: socket_parent_frame=LHCoxa_offset socket_child_frame=LHFemur_offset
      PhysicalOffsetFrame LHCoxa_offset: socket_parent=/bodyset/LHCoxa
          translation=(-0.0002747402 -0.0001835142 -0.199417)
      PhysicalOffsetFrame LHFemur_offset: socket_parent=/bodyset/LHFemur
    WeldJoint joint_LHTarsus1: socket_parent_frame=LHTibia_offset socket_child_frame=LHTarsus1_offset
      PhysicalOffsetFrame LHTibia_offset: socket_parent=/bodyset/LHTibia
          translation=(0.0002599845 -0.0004872127 -0.6844566)
      PhysicalOffsetFrame LHTarsus1_offset: socket_parent=/bodyset/LHTarsus1
    WeldJoint joint_LHTarsus2: socket_parent_frame=LHTarsus1_offset socket_child_frame=LHTarsus2_offset
      PhysicalOffsetFrame LHTarsus1_offset: socket_parent=/bodyset/LHTarsus1
          translation=(-5.884795e-5 0.0007203926 -0.3527433)
      PhysicalOffsetFrame LHTarsus2_offset: socket_parent=/bodyset/LHTarsus2
    WeldJoint joint_LHTarsus3: socket_parent_frame=LHTarsus2_offset socket_child_frame=LHTarsus3_offset
      PhysicalOffsetFrame LHTarsus2_offset: socket_parent=/bodyset/LHTarsus2
          translation=(1.944136e-5 -0.000928696 -0.1750531)
      PhysicalOffsetFrame LHTarsus3_offset: socket_parent=/bodyset/LHTarsus3
    WeldJoint joint_LHTarsus4: socket_parent_frame=LHTarsus3_offset socket_child_frame=LHTarsus4_offset
      PhysicalOffsetFrame LHTarsus3_offset: socket_parent=/bodyset/LHTarsus3
          translation=(6.431947e-6 0.0009782889 -0.09670854)
      PhysicalOffsetFrame LHTarsus4_offset: socket_parent=/bodyset/LHTarsus4
    WeldJoint joint_LHTarsus5: socket_parent_frame=LHTarsus4_offset socket_child_frame=LHTarsus5_offset
      PhysicalOffsetFrame LHTarsus4_offset: socket_parent=/bodyset/LHTarsus4
          translation=(7.185736e-5 -0.0002378292 -0.07330452)
      PhysicalOffsetFrame LHTarsus5_offset: socket_parent=/bodyset/LHTarsus5
    WeldJoint joint_LHTibia: socket_parent_frame=LHFemur_offset socket_child_frame=LHTibia_offset
      PhysicalOffsetFrame LHFemur_offset: socket_parent=/bodyset/LHFemur
          translation=(0.0001354201 -0.000185566 -0.8363154)
      PhysicalOffsetFrame LHTibia_offset: socket_parent=/bodyset/LHTibia
    WeldJoint joint_LHaltere: socket_parent_frame=Thorax_offset socket_child_frame=LHaltere_offset
      PhysicalOffsetFrame Thorax_offset: socket_parent=/bodyset/Thorax translation=(-0.7773967 0.2172457 -0.1546809)
      PhysicalOffsetFrame LHaltere_offset: socket_parent=/bodyset/LHaltere
    WeldJoint joint_LMCoxa: socket_parent_frame=Thorax_offset socket_child_frame=LMCoxa_offset
      PhysicalOffsetFrame Thorax_offset: socket_parent=/bodyset/Thorax translation=(-0.5255467 0.1285536 -0.4854284)
      PhysicalOffsetFrame LMCoxa_offset: socket_parent=/bodyset/LMCoxa
    WeldJoint joint_LMFemur: socket_parent_frame=LMCoxa_offset socket_child_frame=LMFemur_offset
      PhysicalOffsetFrame LMCoxa_offset: socket_parent=/bodyset/LMCoxa
          translation=(-0.0002158995 0.0001283624 -0.1814469)
      PhysicalOffsetFrame LMFemur_offset: socket_parent=/bodyset/LMFemur
    WeldJoint joint_LMTarsus1: socket_parent_frame=LMTibia_offset socket_child_frame=LMTarsus1_offset
      PhysicalOffsetFrame LMTibia_offset: socket_parent=/bodyset/LMTibia
          translation=(0.0002793895 0.0002645538 -0.667327)
      PhysicalOffsetFrame LMTarsus1_offset: socket_parent=/bodyset/LMTarsus1
    WeldJoint joint_LMTarsus2: socket_parent_frame=LMTarsus1_offset socket_child_frame=LMTarsus2_offset
      PhysicalOffsetFrame LMTarsus1_offset: socket_parent=/bodyset/LMTarsus1
          translation=(0.0004465292 -0.0006063638 -0.2943366)
      PhysicalOffsetFrame LMTarsus2_offset: socket_parent=/bodyset/LMTarsus2
    WeldJoint joint_LMTarsus3: socket_parent_frame=LMTarsus2_offset socket_child_frame=LMTarsus3_offset
      PhysicalOffsetFrame LMTarsus2_offset: socket_parent=/bodyset/LMTarsus2
          translation=(-9.113137e-5 -0.000165237 -0.1591655)
      PhysicalOffsetFrame LMTarsus3_offset: socket_parent=/bodyset/LMTarsus3
    WeldJoint joint_LMTarsus4: socket_parent_frame=LMTarsus3_offset socket_child_frame=LMTarsus4_offset
      PhysicalOffsetFrame LMTarsus3_offset: socket_parent=/bodyset/LMTarsus3
          translation=(0.0002296001 -0.0001475855 -0.08973421)
      PhysicalOffsetFrame LMTarsus4_offset: socket_parent=/bodyset/LMTarsus4
    WeldJoint joint_LMTarsus5: socket_parent_frame=LMTarsus4_offset socket_child_frame=LMTarsus5_offset
      PhysicalOffsetFrame LMTarsus4_offset: socket_parent=/bodyset/LMTarsus4
          translation=(0.0001935077 6.846676e-5 -0.06327825)
      PhysicalOffsetFrame LMTarsus5_offset: socket_parent=/bodyset/LMTarsus5
    WeldJoint joint_LMTibia: socket_parent_frame=LMFemur_offset socket_child_frame=LMTibia_offset
      PhysicalOffsetFrame LMFemur_offset: socket_parent=/bodyset/LMFemur
          translation=(-0.000969776 0.0002509914 -0.7836705)
      PhysicalOffsetFrame LMTibia_offset: socket_parent=/bodyset/LMTibia
    WeldJoint joint_LPedicel: socket_parent_frame=Head_offset socket_child_frame=LPedicel_offset
      PhysicalOffsetFrame Head_offset: socket_parent=/bodyset/Head translation=(0.4451292 0.08574404 0.09247509)
      PhysicalOffsetFrame LPedicel_offset: socket_parent=/bodyset/LPedicel
    WeldJoint joint_LWing: socket_parent_frame=Thorax_offset socket_child_frame=LWing_offset
      PhysicalOffsetFrame Thorax_offset: socket_parent=/bodyset/Thorax translation=(-0.5184241 0.3735565 0.1782372)
      PhysicalOffsetFrame LWing_offset: socket_parent=/bodyset/LWing
    WeldJoint joint_RArista: socket_parent_frame=RFuniculus_offset socket_child_frame=RArista_offset
      PhysicalOffsetFrame RFuniculus_offset: socket_parent=/bodyset/RFuniculus
          translation=(0.0149546 -0.05103762 -0.06928865)
      PhysicalOffsetFrame RArista_offset: socket_parent=/bodyset/RArista
    WeldJoint joint_REye: socket_parent_frame=Head_offset socket_child_frame=REye_offset
      PhysicalOffsetFrame Head_offset: socket_parent=/bodyset/Head translation=(0.2549271 -0.004274087 0.02267305)
      PhysicalOffsetFrame REye_offset: socket_parent=/bodyset/REye
    CustomJoint joint_RFCoxa: socket_parent_frame=Thorax_offset socket_child_frame=RFCoxa_offset
      Coordinate joint_RFCoxa_roll: default_value=0 range=(-3.141593 3.141593) locked=true
      Coordinate joint_RFCoxa_yaw: default_value=0 range=(-3.141593 3.141593) locked=true
      Coordinate joint_RFCoxa_pitch: default_value=0 range=(-3.141593 3.141593) locked=true
      PhysicalOffsetFrame Thorax_offset: socket_parent=/bodyset/Thorax translation=(-0.1335551 -0.1825276 -0.2280803)
      PhysicalOffsetFrame RFCoxa_offset: socket_parent=/bodyset/RFCoxa
      SpatialTransform: axes_held_at_zero=(translation1 translation2 translation3)
        TransformAxis rotation1: coordinates=joint_RFCoxa_roll axis=(0 0 1) LinearFunction(coefficients=1 0)
        TransformAxis rotation2: coordinates=joint_RFCoxa_yaw axis=(1 0 0) LinearFunction(coefficients=1 0)
        TransformAxis rotation3: coordinates=joint_RFCoxa_pitch axis=(0 1 0) LinearFunction(coefficients=1 0)
    WeldJoint joint_RFFemur: socket_parent_frame=RFTrochanter_offset socket_child_frame=RFFemur_offset
      PhysicalOffsetFrame RFTrochanter_offset: socket_parent=/bodyset/RFTrochanter
          translation=(-0.01809758 -0.09072635 -0.06337365)
      PhysicalOffsetFrame RFFemur_offset: socket_parent=/bodyset/RFFemur
    WeldJoint joint_RFTarsus1: socket_parent_frame=RFTibia_offset socket_child_frame=RFTarsus1_offset
      PhysicalOffsetFrame RFTibia_offset: socket_parent=/bodyset/RFTibia
          translation=(0.01583342 -0.006301794 -0.5079733)
      PhysicalOffsetFrame RFTarsus1_offset: socket_parent=/bodyset/RFTarsus1
    WeldJoint joint_RFTarsus2: socket_parent_frame=RFTarsus1_offset socket_child_frame=RFTarsus2_offset
      PhysicalOffsetFrame RFTarsus1_offset: socket_parent=/bodyset/RFTarsus1
          translation=(0.001019187 0.01109487 -0.2182958)
      PhysicalOffsetFrame RFTarsus2_offset: socket_parent=/bodyset/RFTarsus2
    WeldJoint joint_RFTarsus3: socket_parent_frame=RFTarsus2_offset socket_child_frame=RFTarsus3_offset
      PhysicalOffsetFrame RFTarsus2_offset: socket_parent=/bodyset/RFTarsus2
          translation=(0.003084278 0.01319766 -0.1542782)
      PhysicalOffsetFrame RFTarsus3_offset: socket_parent=/bodyset/RFTarsus3
    WeldJoint joint_RFTarsus4: socket_parent_frame=RFTarsus3_offset socket_child_frame=RFTarsus4_offset
      PhysicalOffsetFrame RFTarsus3_offset: socket_parent=/bodyset/RFTarsus3
          translation=(-0.0004489848 0.00776659 -0.09940716)
      PhysicalOffsetFrame RFTarsus4_offset: socket_parent=/bodyset/RFTarsus4
    WeldJoint joint_RFTarsus5: socket_parent_frame=RFTarsus4_offset socket_child_frame=RFTarsus5_offset
      PhysicalOffsetFrame RFTarsus4_offset: socket_parent=/bodyset/RFTarsus4
          translation=(0.0007482013 0.006684655 -0.08619111)
      PhysicalOffsetFrame RFTarsus5_offset: socket_parent=/bodyset/RFTarsus5
    CustomJoint joint_RFTibia: socket_parent_frame=RFFemur_offset socket_child_frame=RFTibia_offset
      Coordinate joint_RFTibia_pitch: default_value=0 range=(-3.141593 3.141593) locked=true
      PhysicalOffsetFrame RFFemur_offset: socket_parent=/bodyset/RFFemur
          translation=(-0.02541157 -0.1005527 -0.5606494)
      PhysicalOffsetFrame RFTibia_offset: socket_parent=/bodyset/RFTibia
      SpatialTransform: axes_held_at_zero=(rotation2 rotation3 translation1 translation2 translation3)
        TransformAxis rotation1: coordinates=joint_RFTibia_pitch axis=(0 1 0) LinearFunction(coefficients=1 0)
    CustomJoint joint_RFTrochanter: socket_parent_frame=RFCoxa_offset socket_child_frame=RFTrochanter_offset
      Coordinate joint_RFTrochanter_yaw: default_value=0 range=(-3.141593 3.141593) locked=true
      Coordinate joint_RFTrochanter_pitch: default_value=0 range=(-3.141593 3.141593) locked=true
      Coordinate joint_RFTrochanter_roll: default_value=0 range=(-3.141593 3.141593) locked=true
      PhysicalOffsetFrame RFCoxa_offset: socket_parent=/bodyset/RFCoxa translation=(0.001000008 -0.01500001 -0.442699)
      PhysicalOffsetFrame RFTrochanter_offset: socket_parent=/bodyset/RFTrochanter
      SpatialTransform: axes_held_at_zero=(translation1 translation2 translation3)
        TransformAxis rotation1: coordinates=joint_RFTrochanter_yaw axis=(1 0 0) LinearFunction(coefficients=1 0)
        TransformAxis rotation2: coordinates=joint_RFTrochanter_pitch axis=(0 1 0) LinearFunction(coefficients=1 0)
        TransformAxis rotation3: coordinates=joint_RFTrochanter_roll axis=(0 0 1) LinearFunction(coefficients=1 0)
    WeldJoint joint_RFuniculus: socket_parent_frame=RPedicel_offset socket_child_frame=RFuniculus_offset
      PhysicalOffsetFrame RPedicel_offset: socket_parent=/bodyset/RPedicel
          translation=(0.04457607 0.0009633877 -0.03700017)
      PhysicalOffsetFrame RFuniculus_offset: socket_parent=/bodyset/RFuniculus
    WeldJoint joint_RHCoxa: socket_parent_frame=Thorax_offset socket_child_frame=RHCoxa_offset
      PhysicalOffsetFrame Thorax_offset: socket_parent=/bodyset/Thorax translation=(-0.7522644 -0.08334146 -0.5017875)
      PhysicalOffsetFrame RHCoxa_offset: socket_parent=/bodyset/RHCoxa
    WeldJoint joint_RHFemur: socket_parent_frame=RHCoxa_offset socket_child_frame=RHFemur_offset
      PhysicalOffsetFrame RHCoxa_offset: socket_parent=/bodyset/RHCoxa
          translation=(-7.831841e-5 0.0002781198 -0.1994172)
      PhysicalOffsetFrame RHFemur_offset: socket_parent=/bodyset/RHFemur
    WeldJoint joint_RHTarsus1: socket_parent_frame=RHTibia_offset socket_child_frame=RHTarsus1_offset
      PhysicalOffsetFrame RHTibia_offset: socket_parent=/bodyset/RHTibia
          translation=(-0.0002619054 0.0001844382 -0.6844564)
      PhysicalOffsetFrame RHTarsus1_offset: socket_parent=/bodyset/RHTarsus1
    WeldJoint joint_RHTarsus2: socket_parent_frame=RHTarsus1_offset socket_child_frame=RHTarsus2_offset
      PhysicalOffsetFrame RHTarsus1_offset: socket_parent=/bodyset/RHTarsus1
          translation=(0.0002525339 -0.0002880115 -0.3527434)
      PhysicalOffsetFrame RHTarsus2_offset: socket_parent=/bodyset/RHTarsus2
    WeldJoint joint_RHTarsus3: socket_parent_frame=RHTarsus2_offset socket_child_frame=RHTarsus3_offset
      PhysicalOffsetFrame RHTarsus2_offset: socket_parent=/bodyset/RHTarsus2
          translation=(0.0002274173 -0.0004124704 -0.1750542)
      PhysicalOffsetFrame RHTarsus3_offset: socket_parent=/bodyset/RHTarsus3
    WeldJoint joint_RHTarsus4: socket_parent_frame=RHTarsus3_offset socket_child_frame=RHTarsus4_offset
      PhysicalOffsetFrame RHTarsus3_offset: socket_parent=/bodyset/RHTarsus3
          translation=(-0.0005174079 0.0003202695 -0.09671098)
      PhysicalOffsetFrame RHTarsus4_offset: socket_parent=/bodyset/RHTarsus4
    WeldJoint joint_RHTarsus5: socket_parent_frame=RHTarsus4_offset socket_child_frame=RHTarsus5_offset
      PhysicalOffsetFrame RHTarsus4_offset: socket_parent=/bodyset/RHTarsus4
          translation=(0.0003564055 -0.0003525784 -0.07330312)
      PhysicalOffsetFrame RHTarsus5_offset: socket_parent=/bodyset/RHTarsus5
    WeldJoint joint_RHTibia: socket_parent_frame=RHFemur_offset socket_child_frame=RHTibia_offset
      PhysicalOffsetFrame RHFemur_offset: socket_parent=/bodyset/RHFemur
          translation=(8.125789e-5 -0.0007450399 -0.8363138)
      PhysicalOffsetFrame RHTibia_offset: socket_parent=/bodyset/RHTibia
    WeldJoint joint_RHaltere: socket_parent_frame=Thorax_offset socket_child_frame=RHaltere_offset
      PhysicalOffsetFrame Thorax_offset: socket_parent=/bodyset/Thorax translation=(-0.7773987 -0.2098675 -0.1546359)
      PhysicalOffsetFrame RHaltere_offset: socket_parent=/bodyset/RHaltere
    WeldJoint joint_RMCoxa: socket_parent_frame=Thorax_offset socket_child_frame=RMCoxa_offset
      PhysicalOffsetFrame Thorax_offset: socket_parent=/bodyset/Thorax translation=(-0.5255479 -0.1212487 -0.4854017)
      PhysicalOffsetFrame RMCoxa_offset: socket_parent=/bodyset/RMCoxa
    WeldJoint joint_RMFemur: socket_parent_frame=RMCoxa_offset socket_child_frame=RMFemur_offset
      PhysicalOffsetFrame RMCoxa_offset: socket_parent=/bodyset/RMCoxa
          translation=(-0.0002155466 -0.0001744847 -0.1814467)
      PhysicalOffsetFrame RMFemur_offset: socket_parent=/bodyset/RMFemur
    WeldJoint joint_RMTarsus1: socket_parent_frame=RMTibia_offset socket_child_frame=RMTarsus1_offset
      PhysicalOffsetFrame RMTibia_offset: socket_parent=/bodyset/RMTibia
          translation=(-0.0001477929 0.0009870419 -0.6673263)
      PhysicalOffsetFrame RMTarsus1_offset: socket_parent=/bodyset/RMTarsus1
    WeldJoint joint_RMTarsus2: socket_parent_frame=RMTarsus1_offset socket_child_frame=RMTarsus2_offset
      PhysicalOffsetFrame RMTarsus1_offset: socket_parent=/bodyset/RMTarsus1
          translation=(0.000578344 -0.0004171088 -0.289969)
      PhysicalOffsetFrame RMTarsus2_offset: socket_parent=/bodyset/RMTarsus2
    WeldJoint joint_RMTarsus3: socket_parent_frame=RMTarsus2_offset socket_child_frame=RMTarsus3_offset
      PhysicalOffsetFrame RMTarsus2_offset: socket_parent=/bodyset/RMTarsus2
          translation=(3.499008e-5 0.0001363733 -0.1601517)
      PhysicalOffsetFrame RMTarsus3_offset: socket_parent=/bodyset/RMTarsus3
    WeldJoint joint_RMTarsus4: socket_parent_frame=RMTarsus3_offset socket_child_frame=RMTarsus4_offset
      PhysicalOffsetFrame RMTarsus3_offset: socket_parent=/bodyset/RMTarsus3
          translation=(-0.0004825088 0.0002315646 -0.09243505)
      PhysicalOffsetFrame RMTarsus4_offset: socket_parent=/bodyset/RMTarsus4
    WeldJoint joint_RMTarsus5: socket_parent_frame=RMTarsus4_offset socket_child_frame=RMTarsus5_offset
      PhysicalOffsetFrame RMTarsus4_offset: socket_parent=/bodyset/RMTarsus4
          translation=(0.001609904 -0.0001304434 -0.06372214)
      PhysicalOffsetFrame RMTarsus5_offset: socket_parent=/bodyset/RMTarsus5
    WeldJoint joint_RMTibia: socket_parent_frame=RMFemur_offset socket_child_frame=RMTibia_offset
      PhysicalOffsetFrame RMFemur_offset: socket_parent=/bodyset/RMFemur
          translation=(-0.0009718606 0.0001209919 -0.7836702)
      PhysicalOffsetFrame RMTibia_offset: socket_parent=/bodyset/RMTibia
    WeldJoint joint_RPedicel: socket_parent_frame=Head_offset socket_child_frame=RPedicel_offset
      PhysicalOffsetFrame Head_offset: socket_parent=/bodyset/Head translation=(0.4451294 -0.09396227 0.09247544)
      PhysicalOffsetFrame RPedicel_offset: socket_parent=/bodyset/RPedicel
    WeldJoint joint_RWing: socket_parent_frame=Thorax_offset socket_child_frame=RWing_offset
      PhysicalOffsetFrame Thorax_offset: socket_parent=/bodyset/Thorax translation=(-0.5184286 -0.3661092 0.1783159)
      PhysicalOffsetFrame RWing_offset: socket_parent=/bodyset/RWing
    WeldJoint joint_Rostrum: socket_parent_frame=Head_offset socket_child_frame=Rostrum_offset
      PhysicalOffsetFrame Head_offset: socket_parent=/bodyset/Head translation=(0.4659537 -0.01275763 -0.2599199)
      PhysicalOffsetFrame Rostrum_offset: socket_parent=/bodyset/Rostrum
  ForceSet:
    Millard2012EquilibriumMuscle [values shared by the 15 below unless stated]: min_control=0.0001 max_control=1
        optimal_force=1 pennation_angle_at_optimal=0 [radians] ignore_tendon_compliance=true fiber_damping=0.001
        default_activation=0.0001 activation_time_constant=0.0001 [seconds] deactivation_time_constant=0.0004 [seconds]
        minimum_activation=0.0001 maximum_pennation_angle=0 [radians]
      ActiveForceLengthCurve: minimum_value=0
      ForceVelocityCurve: concentric_slope_at_vmax=0 concentric_slope_near_vmax=0.25 isometric_slope=5
          eccentric_slope_at_vmax=0 eccentric_slope_near_vmax=0.15 max_eccentric_velocity_force_multiplier=1.4
      FiberForceLengthCurve
      TendonForceLengthCurve
    Millard2012EquilibriumMuscle LFC_tergopleural_promotor_a: max_isometric_force=9.318671
        optimal_fiber_length=0.1652585 tendon_slack_length=0.008697818 max_contraction_velocity=42.08814
        default_fiber_length=0.1722168
      PathPoint LFC_Miller28a_p1: Thorax (-0.1146538 0.2578822 -0.07673163)
      PathPoint LFC_Miller28a_p296: Thorax (-0.05369724 0.1958846 -0.1568746)
      PathPoint LFC_Miller28a_p396: LFCoxa (0.02451058 -0.04074812 0.04718958)
    Millard2012EquilibriumMuscle LFC_tergopleural_promotor_b: max_isometric_force=46.19923
        optimal_fiber_length=0.2755579 tendon_slack_length=0.02774112 max_contraction_velocity=29.58256
        default_fiber_length=0.300266
      PathPoint LFC_Miller28b_p1: Thorax (-0.02401419 0.1734287 0.09483715)
      PathPoint LFC_Miller28b_p296: Thorax (-0.04881253 0.1903863 -0.1459797)
      PathPoint LFC_Miller28b_p396: LFCoxa (0.01430188 -0.01509232 0.001564408)
    Millard2012EquilibriumMuscle LFC_pleural_remotor_and_abductor: max_isometric_force=16.07337
        optimal_fiber_length=0.1750403 tendon_slack_length=0.06469705 max_contraction_velocity=62.17201
        default_fiber_length=0.23734
      PathPoint LFC_Miller29_p1: Thorax (-0.1426572 0.3604015 -0.01361607)
      PathPoint LFC_Miller29_p296: LFCoxa (-0.01465047 0.06072933 -0.001467631)
    Millard2012EquilibriumMuscle LFC_pleural_promotor: max_isometric_force=16.32185 optimal_fiber_length=0.08604678
        tendon_slack_length=0.03354001 max_contraction_velocity=24.81063 default_fiber_length=0.1183909
      PathPoint LFC_Miller30_p1: Thorax (-0.07111324 0.09494241 -0.1896036)
      PathPoint LFC_Miller30_p296: LFCoxa (0.02370582 -0.02863615 -0.01284082)
    Millard2012EquilibriumMuscle LFC_sternal_anterior_rotator: max_isometric_force=50.19042
        optimal_fiber_length=0.06355076 tendon_slack_length=0.1549944 max_contraction_velocity=48.7076
        default_fiber_length=0.2163597
      PathPoint LFC_Miller31_p1: Thorax (-0.1150849 -0.003512548 -0.2615772)
      PathPoint LFC_Miller31_p296: LFCoxa (-0.0002520244 -0.04179527 -0.07813756)
    Millard2012EquilibriumMuscle LFC_sternal_posterior_rotator: max_isometric_force=98.16552
        optimal_fiber_length=0.1065982 tendon_slack_length=0.01468251 max_contraction_velocity=19.06324
        default_fiber_length=0.1200679
      PathPoint LFC_Miller32_p1: Thorax (-0.1930896 0.1550952 -0.2123727)
      PathPoint LFC_Miller32_p296: LFCoxa (-0.02351262 0.04471508 -0.06539779)
    Millard2012EquilibriumMuscle LFC_sternal_adductor: max_isometric_force=9.079973 optimal_fiber_length=0.1461621
        tendon_slack_length=0.05636691 max_contraction_velocity=13.62214 default_fiber_length=0.2005037
      PathPoint LFC_Miller33_p1: Thorax (-0.2245258 0.005173879 -0.2835813)
      PathPoint LFC_Miller33_p296: LFCoxa (0.01710119 -0.06611541 -0.1072604)
    Millard2012EquilibriumMuscle LFF_trochanter_flexor_b: max_isometric_force=66.94012 optimal_fiber_length=0.1959653
        tendon_slack_length=0.1719019 max_contraction_velocity=8.514621 default_fiber_length=0.2904817
      PathPoint lff_thco_flexb_p1: LFCoxa (0.01702075 -0.05957342 -0.149676)
      PathPoint lff_thco_flexb_p222: LFCoxa (0.005384584 -0.0006883462 -0.3239792)
      PathPoint lff_thco_flexb_p322: LFTrochanter (-0.01704052 -0.004723355 -0.02288866)
    Millard2012EquilibriumMuscle LFF_sterno-tergo-trochanter_extensor_a: max_isometric_force=92.62524
        optimal_fiber_length=0.2008695 tendon_slack_length=0.09143414 max_contraction_velocity=49.18732
        default_fiber_length=0.2011636
      PathPoint lff_thco_stta_p1: LFCoxa (-0.02597217 0.05079324 -0.1387586)
      PathPoint lff_thco_stta_p222: LFCoxa (-0.03522484 0.01263124 -0.3739377)
      PathPoint lff_thco_stta_p322: LFTrochanter (0.02226866 -0.008128766 0.02110952)
    Millard2012EquilibriumMuscle LFF_sterno-tergo-trochanter_extensor_b: max_isometric_force=70.47536
        optimal_fiber_length=0.1858131 tendon_slack_length=0.1073279 max_contraction_velocity=12.24528
        default_fiber_length=0.5588811
      PathPoint LFF_sterno-tergo-trochanter_extensor_b_p1: LFCoxa (-0.0208632 -0.07096678 -0.1786207)
      PathPoint LFF_sterno-tergo-trochanter_extensor_b_p222: LFCoxa (-0.03893825 -0.009389343 -0.3628839)
      PathPoint LFF_sterno-tergo-trochanter_extensor_b_p322: LFTrochanter (0.006575609 -0.02799582 0.03413953)
    Millard2012EquilibriumMuscle LFF_accesory_trochanter_flexor: max_isometric_force=15.18077
        optimal_fiber_length=0.07356437 tendon_slack_length=0.1631478 max_contraction_velocity=56.50612
        default_fiber_length=0.148875
      PathPoint LFF_roll_f_p1: LFCoxa (-0.01930813 0.04797849 -0.2071051)
      PathPoint LFF_roll_f_p222: LFTrochanter (-0.005492186 -0.01999538 -0.02533379)
    Millard2012EquilibriumMuscle LFF_trochanter_extensor: max_isometric_force=25.78169 optimal_fiber_length=0.101407
        tendon_slack_length=0.01773247 max_contraction_velocity=71.73696 default_fiber_length=0.05558909
      PathPoint LFF_roll_e_p1: LFCoxa (-0.03814874 0.04046316 -0.3398364)
      PathPoint LFF_roll_e_p222: LFTrochanter (0.01020469 0.01362599 0.00768368)
    Millard2012EquilibriumMuscle LFF_trochanter_flexor_a: max_isometric_force=27.44896 optimal_fiber_length=0.3494738
        tendon_slack_length=0.01839336 max_contraction_velocity=92.21973 default_fiber_length=0.2904817
      PathPoint LFF_flexa_p1: LFCoxa (0.03112536 0.01435798 -0.05591436)
      PathPoint LFF_flexa_p222: LFTrochanter (-0.01218281 -0.01176946 -0.04037462)
    Millard2012EquilibriumMuscle LFTibia_flex_93434: max_isometric_force=41.5315 optimal_fiber_length=0.4000623
        tendon_slack_length=0.0594645 max_contraction_velocity=75.6441 default_fiber_length=0.4549316
      PathPoint bifemlh_r-P1: LFFemur (-0.0415201 0.04753757 -0.08777667)
      PathPoint bifemlh_r-P2: LFFemur (-0.01519676 0.1109018 -0.5466271)
      PathPoint pp21995: LFTibia (-0.01086941 0.01147271 -0.01073311)
    Millard2012EquilibriumMuscle LFTibia_extensor_93932: max_isometric_force=154.0637 optimal_fiber_length=0.4235533
        tendon_slack_length=0.1409731 max_contraction_velocity=24.79435 default_fiber_length=0.5588811
      PathPoint bifemlh_r-P1: LFFemur (0.02768277 0.03845909 -0.08953115)
      PathPoint bifemlh_r-P2: LFFemur (0.02675364 0.1052562 -0.5970779)
      PathPoint pp21995: LFTibia (0.035 0.002 0.0009275151)
  MarkerSet:
    Marker m_coxa: LFCoxa (0 0 0)
    Marker m_trochanter: LFTrochanter (0 0 0)
    Marker m_femur: LFFemur (0 0 0)
    Marker m_tibia: LFTibia (0 0 0)
    Marker m_tarsus1: LFTarsus1 (0 0 0)
    Marker m_tarsus2: LFTarsus2 (0 0 0)
    Marker m_tarsus3: LFTarsus3 (0 0 0)
    Marker m_tarsus4: LFTarsus4 (0 0 0)
    Marker m_tarsus5: LFTarsus5 (0 0 0)
